*Heading
** Job name: Burst_Analysis_Al Model name: Model-1
** Generated by: Abaqus/CAE 2020
*Preprint, echo=NO, model=NO, history=NO, contact=NO
**
** PARTS
**
*Part, name=Part-1
*Node
      1, 0.0500000007,           0.
      2, 0.0520000011,           0.
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*Element, type=CAX4R
   1,    1,    2,  103,  102
   2,    2,    3,  104,  103
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*Nset, nset=Set-1, generate
    1,  1111,     1
*Elset, elset=Set-1, generate
    1,  1000,     1
** Section: DiscSection
*Solid Section, elset=Set-1, material=Aluminium
,
*End Part
**
**
** ASSEMBLY
**
*Assembly, name=Assembly
**
*Instance, name=Part-1-1, part=Part-1
*End Instance
**
*Nset, nset=Set-1, instance=Part-1-1, generate
   1,  101,    1
*Elset, elset=Set-1, instance=Part-1-1, generate
   1,  100,    1
*Nset, nset=Set-2, instance=Part-1-1, generate
    1,  1111,     1
*Elset, elset=Set-2, instance=Part-1-1, generate
    1,  1000,     1
*End Assembly
**
** MATERIALS
**
*Material, name=Aluminium
*Density
2900.,
*Elastic
 7.1e+10, 0.33
**
** BOUNDARY CONDITIONS
**
** Name: BC1 Type: Displacement/Rotation
*Boundary
Set-1, 2, 2
** ----------------------------------------------------------------
**
** STEP: LoadStep
**
*Step, name=LoadStep, nlgeom=NO
*Static
1., 1., 1e-05, 1.
**
** LOADS
**
** Name: CentrifugalLoad   Type: Rotational body force
*Dload
Set-2, CENTRIF, 4.38651e+06,0.,0.,0.,0.0,1.0,0.0
**
** OUTPUT REQUESTS
**
*Restart, write, frequency=0
**
** FIELD OUTPUT: F-Output-1
**
*Output, field, variable=PRESELECT
**
** HISTORY OUTPUT: H-Output-1
**
*Output, history, variable=PRESELECT
*End Step
